*Heading
** Job name: Composite_L10_W10_t1_Sa2_Sb4_X045_Y015 Model name: Composite_L10_W10_t1_Sa2_Sb4_X045_Y015
** Generated by: Abaqus/CAE 2017
*Preprint, echo=NO, model=NO, history=NO, contact=NO
**
** PARTS
**
*Part, name=CompositePlate
*Node
      1,           1.,           0.,           0.
      2,           2.,           0.,           0.
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*Element, type=STRI65
  1,    1,   17,  100, 4087, 4088, 4089
  2,   17,  523,  100, 4090, 4091, 4088
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** Region: (CFRPLayup-1: Generated From Layup)
*Elset, elset=CFRPLayup-1, generate
    1,  7872,     1
** Section: CFRPLayup-1
*Shell Section, elset=CFRPLayup-1, composite, layup=CFRPLayup, symmetric
0.125, 1, CFRP, 45., Ply-1
0.125, 1, CFRP, 90., Ply-2
0.125, 1, CFRP, -45., Ply-3
0.125, 1, CFRP, 0., Ply-4
*End Part
**
**
** ASSEMBLY
**
*Assembly, name=Assembly
**
*Instance, name=CompositePlate-1, part=CompositePlate
*End Instance
**
*Nset, nset=_PickedSet4, internal, instance=CompositePlate-1
    12,    13,    16,   382,   383,   384
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*Elset, elset=_PickedSet4, internal, instance=CompositePlate-1
 4238, 4246, 4794, 5137, 5181, 5204
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*Nset, nset=_PickedSet5, internal, instance=CompositePlate-1
    14,    15,    16,   463,   464,   465
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*Elset, elset=_PickedSet5, internal, instance=CompositePlate-1
 5570, 5571, 5590, 6119, 6484, 6485
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*Nset, nset=_PickedSet6, internal, instance=CompositePlate-1
    10,    11,    15,   346,   347,   348
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*Elset, elset=_PickedSet6, internal, instance=CompositePlate-1
 3100, 3101, 3120, 3134, 3367, 3516
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*Nset, nset=_PickedSet7, internal, instance=CompositePlate-1
     9,    10,    13,   326,   327,   328
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*Elset, elset=_PickedSet7, internal, instance=CompositePlate-1
 3083, 3100, 3119, 3500, 3520, 3533
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*End Assembly
**
** MATERIALS
**
*Material, name=CFRP
*Damage Initiation, criterion=HASHIN
2800.,1700.,  60., 125.,  90.,  90.
*Damage Evolution, type=ENERGY
100., 100., 0.22, 0.72
*Damage Stabilization
0.005,0.005,0.005,0.005
*Elastic, type=LAMINA
161000.,11000.,  0.32, 5170., 5170., 5170.
*Fail Stress
2800.,1700.,  60., 125.,  90.,   0.,   0.
** ----------------------------------------------------------------
**
** STEP: Load
**
*Step, name=Load, nlgeom=YES, inc=1000
*Static
1e-05, 1., 1e-20, 1.
**
** BOUNDARY CONDITIONS
**
** Name: Bottom Type: Displacement/Rotation
*Boundary
_PickedSet4, 2, 2, -0.015
** Name: Left Type: Displacement/Rotation
*Boundary
_PickedSet5, 1, 1, -0.045
** Name: Right Type: Displacement/Rotation
*Boundary
_PickedSet7, 1, 1, 0.045
** Name: Top Type: Displacement/Rotation
*Boundary
_PickedSet6, 2, 2, 0.015
**
** OUTPUT REQUESTS
**
*Restart, write, frequency=0
**
** FIELD OUTPUT: F-Output-1
**
*Output, field
*Element Output, elset=CompositePlate-1.CFRPLayup-1, directions=YES
1, 2, 3, 4, 5, 6, 7, 8
HSNFCCRT, HSNFTCRT, HSNMCCRT, HSNMTCRT
**
** HISTORY OUTPUT: H-Output-1
**
*Output, history, variable=PRESELECT
*End Step
